fp := 420*10^6
fc := 7*10^6
Re := 1.99896
Ik0 := 9.65*10^-15
β := 200
a0 := 0.319
L3 := 5*10^-6
QL := 120
S := 1.3696
Esm := 0.6
Uce := 15
Uko := Uce/3 = 5
ωp := 2*π*fp = 2.63894e9
ρ := ωp*L3 = 13194.7
CΣ := 1/(ωp*ρ) = 2.87192e-14
Rp := ρ*QL = 1583363
γ0 := a0*1 = 0.319
p := sqrt(Re/Rp) = 0.0011236
C2 := CΣ/p = 2.55599e-11
C1 := C2
C3 := 1/(1/CΣ - 1/C2 - 1/C1) = 2.87838e-14
Ub := Esm + 3*Ik0/S*(1 + 0.5/γ0) = 0.6
Rist := 3*β/(4*S)*(1 + 0.5/γ0) = 281.184
R5 := 3*Rist/β = 4.21776
Ep := Uko = 5
